// COMSOL Multiphysics 6.3.0.638 model "test_brinkman.mph"
// Outline of the model tree

Parameters
  L = 0.05
  currentiter = 0

Functions
  an1: Analytic "Solid(1=solid 0=flow)" | funcname = isSolid_test; expr = step1(0.2^2-(x-0.5)^2-(y-0.5)^2-(z-0.5)^2); args = {x, y, z}
  step1: Step | smooth = 0.002
  an2: Analytic "TPMS" | funcname = isSolid; expr = step1(-sin(x/L)*cos(y/L)-sin(y/L)*cos(z/L)-sin(z/L)*cos(x/L)); args = {x, y, z}

Variables
  var1 "Variables 1"
    kappa_val = 1e-12 + (1-isSolid(x,y, z))*1e7
    L = 5

Selections
  sel1: Explicit on no boundaries
  sel2: Explicit on no boundaries | angletol = 0.0872664625997

Geometry
  geom1 "Geometry 1" (3D, length unit m)
    blk1: Block | size = {1, 1, 1}
    fin: Finalize "Form Union"

Materials
  mat1: Common "Water, liquid" on all domains
    def: def "Basic"
      thermalexpansioncoefficient = alpha_p(T)
      bulkviscosity = muB(T)
      dynamicviscosity = eta(T)
      ratioofspecificheat = gamma_w(T)
      electricconductivity = 5.5e-6[S/m]
      heatcapacity = Cp(T)
      density = rho(T)
      thermalconductivity = k(T)
      soundspeed = cs(T)
      eta: Piecewise
        arg = T
        pieces = 
          {273.15, 413.15, 1.3799566804-0.021224019151*T^1+1.3604562827E-4*T^2-4.6454090319E-7*T^3+8.9042735735E-10*T^4-9.0790692686E-13*T^5+3.8457331488E-16*T^6}
          {413.15, 553.75, 0.00401235783-2.10746715E-5*T^1+3.85772275E-8*T^2-2.39730284E-11*T^3}
        argunit = K
        fununit = Pa*s
      Cp: Piecewise | arg = T; pieces = {273.15, 553.75, 12010.1471-80.4072879*T^1+0.309866854*T^2-5.38186884E-4*T^3+3.62536437E-7*T^4}; argunit = K; fununit = J/(kg*K)
      rho: Piecewise
        arg = T
        smooth = contd1
        pieces = 
          {273.15, 293.15, 6.3092789034e-05*T^3-0.0603676398829*T^2+18.9229382407066*T-950.704055329848}
          {293.15, 373.15, 1.0335053319e-05*T^3-0.0133950656345*T^2+4.96928883266*T+432.257114008512}
        argunit = K
        fununit = kg/m^3
      k: Piecewise | arg = T; pieces = {273.15, 553.75, -0.869083936+0.00894880345*T^1-1.58366345E-5*T^2+7.97543259E-9*T^3}; argunit = K; fununit = W/(m*K)
      cs: Interpolation
        funcnametable = {cs, 1}
        table = {{273, 1403}, {278, 1427}, {283, 1447}, {293, 1481}, {303, 1507}, {313, 1526}, {323, 1541}, {333, 1552}, {343, 1555}, {353, 1555}, {363, 1550}, {373, 1543}}
        interp = piecewisecubic
        fununit = m/s
        argunit = K
      an1: Analytic | funcname = alpha_p; expr = -1/rho(T)*d(rho(T),T); args = T; fununit = 1/K; argunit = K
      an2: Analytic | funcname = gamma_w; expr = 1+(T/Cp(T))*(alpha_p(T)*cs(T))^2; args = T; fununit = 1; argunit = K
      an3: Analytic | funcname = muB; expr = 2.79*eta(T); args = T; fununit = Pa*s; argunit = K

Physics
  br: PorousMediaFlowBrinkman "Brinkman Equations" on all domains
    dependent variable u = {u, v, w}
    porous1: PorousMedium (default)
      fluid1: FluidPorousMedium "Fluid 1" (default)
        fluid = dommat
        Constitutiverelation = Newtonian
        nonNewtonianModels = PowerLaw
        sr_ref = 1[1/s]
        sr_lowlimit = 0.01[1/s]
        m_p = 10[s]
        mu_init_app = br.mu0e
        kf = 1[1/s]
        kb = 1[1/s]
        m_y0 = 1e-3[Pa*s]
        m_yt = 0[Pa*s]
        tau_y0 = 0[N/m^2]
        tau_yt = 0[N/m^2]
        nb = 1
        nf = 1
        alpha = 1
        C = 4
        Twlf = 293.15[K]
        C1wlf = 8.86
        C2wlf = 51.6[K]
        T0 = 293.15[K]
        alphaT = 1
        shift_temperature = br.Tref
      pm1: PorousMatrixPorousMedium "Porous Matrix 1" (default)
        epsilon_p_mat = userdef
        epsilon_p = 1
        kappa_mat = userdef
        kappa = kappa_val
    init1: init "Initial Values 1" (default)
    wallbc1: WallBC "Wall 1" (default)
    inl1: InletBoundary "Inlet 1" on boundaries 1 | ComponentWise = NormalInflowVelocity; U0in = 1
    out1: OutletBoundary "Outlet 1" on boundaries 6

Mesh
  mesh1 "Mesh 1" (physics-controlled)
    size: MeshSizeDefault | table = cfd; hauto = 6

Studies
  std1 "Study 1"
    stat: Stationary

Solver configurations
  sol1 "Solution 1" (study std1)
    v1: Variables "Dependent Variables 1"
    s1: Stationary "Stationary Solver 1"
      fc1: FullyCoupled
      dDef: Direct | linsolver = pardiso

Datasets
  dset1: Solution | solution = sol1
  surf1: Surface "Exterior Walls" on boundaries 2-5 | data = dset1
  an1_ds1: Grid3D

Plots
  pg1: PlotGroup3D "Velocity (br)" | data = dset1
    slc1: Slice (disabled) | expr = br.U
    vol1: Volume (disabled) | expr = br.U
    str1: Streamline "Streamline(SLICE)" (disabled) on boundaries 1
      expr = {u, v, w}
      selnumber = 200
      startmethod = coord
      xcoord = 0
      ycoord = range(0,0.00502512562814,1)
      zcoord = 0.5
    iso1: Isosurface | expr = comp1.isSolid(x, y, z); levelmethod = levels; levels = 0.5
    slc2: Slice (disabled) | expr = br.U; quickplane = xy; quickzmethod = coord; quickz = 0.5
    str2: Streamline "Streamline(INPUT)" on boundaries 1 | expr = {u, v, w}; selnumber = 5000
  pg2: PlotGroup3D "Pressure (br)" | data = surf1
    surf1: Surface | expr = p
      tran1: Transparency
  pg3: PlotGroup3D "3D Plot Group 3" | data = an1_ds1
    iso1: Isosurface | expr = comp1.isSolid(x, y, z); levelmethod = levels; levels = 0.5